New	Load.S1a	Bus1=x1.1	Phases=1	Conn=Wye	Model=1	kV=0.24	kW=40.0	kvar=20.0
New	Load.S2b	Bus1=x2.2	Phases=1	Conn=Wye	Model=1	kV=0.24	kW=20.0	kvar=10.0
New	Load.S4c	Bus1=x4.3	Phases=1	Conn=Wye	Model=1	kV=0.24	kW=40.0	kvar=20.0
New	Load.S5c	Bus1=x5.3	Phases=1	Conn=Wye	Model=5	kV=0.24	kW=20.0	kvar=10.0
New	Load.S6c	Bus1=x6.3	Phases=1	Conn=Wye	Model=2	kV=0.24	kW=40.0	kvar=20.0
New	Load.S7a	Bus1=x7.1	Phases=1	Conn=Wye	Model=1	kV=0.24	kW=20.0	kvar=10.0
New	Load.S9a	Bus1=x9.1	Phases=1	Conn=Wye	Model=1	kV=0.24	kW=40.0	kvar=20.0
New	Load.S10a	Bus1=x10.1	Phases=1	Conn=Wye	Model=5	kV=0.24	kW=20.0	kvar=10.0
New	Load.S11a	Bus1=x11.1	Phases=1	Conn=Wye	Model=2	kV=0.24	kW=40.0	kvar=20.0
New	Load.S12b	Bus1=x12.2	Phases=1	Conn=Wye	Model=1	kV=0.24	kW=20.0	kvar=10.0
New	Load.S16c	Bus1=x16.3	Phases=1	Conn=Wye	Model=1	kV=0.24	kW=40.0	kvar=20.0
New	Load.S17c	Bus1=x17.3	Phases=1	Conn=Wye	Model=1	kV=0.24	kW=20.0	kvar=10.0
New	Load.S19a	Bus1=x19.1	Phases=1	Conn=Wye	Model=1	kV=0.24	kW=40.0	kvar=20.0
New	Load.S20a	Bus1=x20.1	Phases=1	Conn=Wye	Model=5	kV=0.24	kW=40.0	kvar=20.0
New	Load.S22b	Bus1=x22.2	Phases=1	Conn=Wye	Model=2	kV=0.24	kW=40.0	kvar=20.0
New	Load.S24c	Bus1=x24.3	Phases=1	Conn=Wye	Model=1	kV=0.24	kW=40.0	kvar=20.0
New	Load.S28a	Bus1=x28.1	Phases=1	Conn=Wye	Model=5	kV=0.24	kW=40.0	kvar=20.0
New	Load.S29a	Bus1=x29.1	Phases=1	Conn=Wye	Model=2	kV=0.24	kW=40.0	kvar=20.0
New	Load.S30c	Bus1=x30.3	Phases=1	Conn=Wye	Model=1	kV=0.24	kW=40.0	kvar=20.0
New	Load.S31c	Bus1=x31.3	Phases=1	Conn=Wye	Model=1	kV=0.24	kW=20.0	kvar=10.0
New	Load.S32c	Bus1=x32.3	Phases=1	Conn=Wye	Model=1	kV=0.24	kW=20.0	kvar=10.0
New	Load.S33a	Bus1=x33.1	Phases=1	Conn=Wye	Model=5	kV=0.24	kW=40.0	kvar=20.0
New	Load.S34c	Bus1=x34.3	Phases=1	Conn=Wye	Model=2	kV=0.24	kW=40.0	kvar=20.0
!New	Load.S35a	Bus1=x35.1	Phases=1	Conn=Wye	Model=1	kV=0.24	kW=40.0	kvar=20.0
!New	Load.S37a	Bus1=x37.1	Phases=1	Conn=Wye	Model=2	kV=0.24	kW=40.0	kvar=20.0
!New	Load.S38b	Bus1=x38.2	Phases=1	Conn=Wye	Model=5	kV=0.24	kW=20.0	kvar=10.0
!New	Load.S39b	Bus1=x39.2	Phases=1	Conn=Wye	Model=1	kV=0.24	kW=20.0	kvar=10.0
!New	Load.S41c	Bus1=x41.3	Phases=1	Conn=Wye	Model=1	kV=0.24	kW=20.0	kvar=10.0
!New	Load.S42a	Bus1=x42.1	Phases=1	Conn=Wye	Model=1	kV=0.24	kW=20.0	kvar=10.0
!New	Load.S43b	Bus1=x43.2	Phases=1	Conn=Wye	Model=2	kV=0.24	kW=40.0	kvar=20.0
!New	Load.S45a	Bus1=x45.1	Phases=1	Conn=Wye	Model=5	kV=0.24	kW=20.0	kvar=10.0
!New	Load.S46a	Bus1=x46.1	Phases=1	Conn=Wye	Model=1	kV=0.24	kW=20.0	kvar=10.0
!New	Load.S47	Bus1=x47	Phases=3	Conn=Wye	Model=5	kV=0.480	kW=105.0	kvar=75.0
!New	Load.S48	Bus1=x48	Phases=3	Conn=Wye	Model=2	kV=0.480	kW=210.0	kVAR=150.0
!New	Load.S49a	Bus1=x49.1	Phases=1	Conn=Wye	Model=1	kV=0.24	kW=35.0	kvar=25.0
!New	Load.S49b	Bus1=x49.2	Phases=1	Conn=Wye	Model=1	kV=0.24	kW=70.0	kvar=50.0
!New	Load.S49c	Bus1=x49.3	Phases=1	Conn=Wye	Model=1	kV=0.24	kW=35.0	kvar=20.0
!New	Load.S50c	Bus1=x50.3	Phases=1	Conn=Wye	Model=1	kV=0.24	kW=40.0	kvar=20.0
!New	Load.S51a	Bus1=x51.1	Phases=1	Conn=Wye	Model=1	kV=0.24	kW=20.0	kvar=10.0
New	Load.S52a	Bus1=x52.1	Phases=1	Conn=Wye	Model=1	kV=0.24	kW=40.0	kvar=20.0
New	Load.S53a	Bus1=x53.1	Phases=1	Conn=Wye	Model=1	kV=0.24	kW=40.0	kvar=20.0
New	Load.S55a	Bus1=x55.1	Phases=1	Conn=Wye	Model=2	kV=0.24	kW=20.0	kvar=10.0
New	Load.S56b	Bus1=x56.2	Phases=1	Conn=Wye	Model=1	kV=0.24	kW=20.0	kvar=10.0
New	Load.S58b	Bus1=x58.2	Phases=1	Conn=Wye	Model=5	kV=0.24	kW=20.0	kvar=10.0
New	Load.S59b	Bus1=x59.2	Phases=1	Conn=Wye	Model=1	kV=0.24	kW=20.0	kvar=10.0
New	Load.S60a	Bus1=x60.1	Phases=1	Conn=Wye	Model=1	kV=0.24	kW=20.0	kvar=10.0
New	Load.S62c	Bus1=x62.3	Phases=1	Conn=Wye	Model=2	kV=0.24	kW=40.0	kvar=20.0
New	Load.S63a	Bus1=x63.1	Phases=1	Conn=Wye	Model=1	kV=0.24	kW=40.0	kvar=20.0
New	Load.S64b	Bus1=x64.2	Phases=1	Conn=Wye	Model=5	kV=0.24	kW=75.0	kvar=35.0
New	Load.S65a	Bus1=x65.1.2	Phases=1	Conn=Delta	Model=2	kV=0.480	kW=35.0	kvar=25.0
New	Load.S65b	Bus1=x65.2.3	Phases=1	Conn=Delta	Model=2	kV=0.480	kW=35.0	kvar=25.0
New	Load.S65c	Bus1=x65.3.1	Phases=1	Conn=Delta	Model=2	kV=0.480	kW=70.0	kvar=50.0
New	Load.S66c	Bus1=x66.3	Phases=1	Conn=Wye	Model=1	kV=0.24	kW=75.0	kvar=35.0
New	Load.S68a	Bus1=x68.1	Phases=1	Conn=Wye	Model=1	kV=0.24	kW=20.0	kvar=10.0
New	Load.S69a	Bus1=x69.1	Phases=1	Conn=Wye	Model=1	kV=0.24	kW=40.0	kvar=20.0
New	Load.S70a	Bus1=x70.1	Phases=1	Conn=Wye	Model=1	kV=0.24	kW=20.0	kvar=10.0
New	Load.S71a	Bus1=x71.1	Phases=1	Conn=Wye	Model=1	kV=0.24	kW=40.0	kvar=20.0
New	Load.S73c	Bus1=x73.3	Phases=1	Conn=Wye	Model=1	kV=0.24	kW=40.0	kvar=20.0
New	Load.S74c	Bus1=x74.3	Phases=1	Conn=Wye	Model=2	kV=0.24	kW=40.0	kvar=20.0
New	Load.S75c	Bus1=x75.3	Phases=1	Conn=Wye	Model=1	kV=0.24	kW=40.0	kvar=20.0
New	Load.S76a	Bus1=x76.1.2	Phases=1	Conn=Delta	Model=5	kV=0.480	kW=105.0	kvar=80.0
New	Load.S76b	Bus1=x76.2.3	Phases=1	Conn=Delta	Model=5	kV=0.480	kW=70.0	kvar=50.0
New	Load.S76c	Bus1=x76.3.1	Phases=1	Conn=Delta	Model=5	kV=0.480	kW=70.0	kvar=50.0
New	Load.S77b	Bus1=x77.2	Phases=1	Conn=Wye	Model=1	kV=0.24	kW=40.0	kvar=20.0
New	Load.S79a	Bus1=x79.1	Phases=1	Conn=Wye	Model=2	kV=0.24	kW=40.0	kvar=20.0
New	Load.S80b	Bus1=x80.2	Phases=1	Conn=Wye	Model=1	kV=0.24	kW=40.0	kvar=20.0
New	Load.S82a	Bus1=x82.1	Phases=1	Conn=Wye	Model=1	kV=0.24	kW=40.0	kvar=20.0
New	Load.S83c	Bus1=x83.3	Phases=1	Conn=Wye	Model=1	kV=0.24	kW=20.0	kvar=10.0
New	Load.S84c	Bus1=x84.3	Phases=1	Conn=Wye	Model=1	kV=0.24	kW=20.0	kvar=10.0
New	Load.S85c	Bus1=x85.3	Phases=1	Conn=Wye	Model=1	kV=0.24	kW=40.0	kvar=20.0
New	Load.S86b	Bus1=x86.2	Phases=1	Conn=Wye	Model=1	kV=0.24	kW=20.0	kvar=10.0
New	Load.S87b	Bus1=x87.2	Phases=1	Conn=Wye	Model=1	kV=0.24	kW=40.0	kvar=20.0
New	Load.S88a	Bus1=x88.1	Phases=1	Conn=Wye	Model=1	kV=0.24	kW=40.0	kvar=20.0
New	Load.S90b	Bus1=x90.2	Phases=1	Conn=Wye	Model=5	kV=0.24	kW=40.0	kvar=20.0
New	Load.S92c	Bus1=x92.3	Phases=1	Conn=Wye	Model=1	kV=0.24	kW=40.0	kvar=20.0
New	Load.S94a	Bus1=x94.1	Phases=1	Conn=Wye	Model=1	kV=0.24	kW=40.0	kvar=20.0
New	Load.S95b	Bus1=x95.2	Phases=1	Conn=Wye	Model=1	kV=0.24	kW=20.0	kvar=10.0
New	Load.S96b	Bus1=x96.2	Phases=1	Conn=Wye	Model=1	kV=0.24	kW=20.0	kvar=10.0
New	Load.S98a	Bus1=x98.1	Phases=1	Conn=Wye	Model=1	kV=0.24	kW=40.0	kvar=20.0
New	Load.S99b	Bus1=x99.2	Phases=1	Conn=Wye	Model=1	kV=0.24	kW=40.0	kvar=20.0
New	Load.S100c	Bus1=x100.3	Phases=1	Conn=Wye	Model=2	kV=0.24	kW=40.0	kvar=20.0
!New	Load.S102c	Bus1=x102.3	Phases=1	Conn=Wye	Model=1	kV=0.24	kW=20.0	kvar=10.0
!New	Load.S103c	Bus1=x103.3	Phases=1	Conn=Wye	Model=1	kV=0.24	kW=40.0	kvar=20.0
!New	Load.S104c	Bus1=x104.3	Phases=1	Conn=Wye	Model=1	kV=0.24	kW=40.0	kvar=20.0
!New	Load.S106b	Bus1=x106.2	Phases=1	Conn=Wye	Model=1	kV=0.24	kW=40.0	kvar=20.0
!New	Load.S107b	Bus1=x107.2	Phases=1	Conn=Wye	Model=1	kV=0.24	kW=40.0	kvar=20.0
!New	Load.S109a	Bus1=x109.1	Phases=1	Conn=Wye	Model=1	kV=0.24	kW=40.0	kvar=20.0
!New	Load.S111a	Bus1=x111.1	Phases=1	Conn=Wye	Model=1	kV=0.24	kW=20.0	kvar=10.0
!New	Load.S112a	Bus1=x112.1	Phases=1	Conn=Wye	Model=5	kV=0.24	kW=20.0	kvar=10.0
!New	Load.S113a	Bus1=x113.1	Phases=1	Conn=Wye	Model=2	kV=0.24	kW=40.0	kvar=20.0
!New	Load.S114a	Bus1=x114.1	Phases=1	Conn=Wye	Model=1	kV=0.24	kW=20.0	kvar=10.0
