New	Transformer.S1a	Phases=1	wdg=1	Bus=1.1	kV=2.4	kVA=50.0	Conn=Wye	wdg=2	Bus=x1.1	kV=0.24	Conn=Wye	kVA=50.0	%imag=0.5	%loadloss=1.5	%noloadloss=0.25	XHL=2
New	Transformer.S2b	Phases=1	wdg=1	Bus=2.2	kV=2.4	kVA=25.0	Conn=Wye	wdg=2	Bus=x2.2	kV=0.24	Conn=Wye	kVA=25.0	%imag=0.5	%loadloss=1.5	%noloadloss=0.25	XHL=2
New	Transformer.S4c	Phases=1	wdg=1	Bus=4.3	kV=2.4	kVA=50.0	Conn=Wye	wdg=2	Bus=x4.3	kV=0.24	Conn=Wye	kVA=50.0	%imag=0.5	%loadloss=1.5	%noloadloss=0.25	XHL=2
New	Transformer.S5c	Phases=1	wdg=1	Bus=5.3	kV=2.4	kVA=25.0	Conn=Wye	wdg=2	Bus=x5.3	kV=0.24	Conn=Wye	kVA=25.0	%imag=0.5	%loadloss=1.5	%noloadloss=0.25	XHL=2
New	Transformer.S6c	Phases=1	wdg=1	Bus=6.3	kV=2.4	kVA=50.0	Conn=Wye	wdg=2	Bus=x6.3	kV=0.24	Conn=Wye	kVA=50.0	%imag=0.5	%loadloss=1.5	%noloadloss=0.25	XHL=2
New	Transformer.S7a	Phases=1	wdg=1	Bus=7.1	kV=2.4	kVA=25.0	Conn=Wye	wdg=2	Bus=x7.1	kV=0.24	Conn=Wye	kVA=25.0	%imag=0.5	%loadloss=1.5	%noloadloss=0.25	XHL=2
New	Transformer.S9a	Phases=1	wdg=1	Bus=9.1	kV=2.4	kVA=50.0	Conn=Wye	wdg=2	Bus=x9.1	kV=0.24	Conn=Wye	kVA=50.0	%imag=0.5	%loadloss=1.5	%noloadloss=0.25	XHL=2
New	Transformer.S10a	Phases=1	wdg=1	Bus=10.1	kV=2.4	kVA=25.0	Conn=Wye	wdg=2	Bus=x10.1	kV=0.24	Conn=Wye	kVA=25.0	%imag=0.5	%loadloss=1.5	%noloadloss=0.25	XHL=2
New	Transformer.S11a	Phases=1	wdg=1	Bus=11.1	kV=2.4	kVA=50.0	Conn=Wye	wdg=2	Bus=x11.1	kV=0.24	Conn=Wye	kVA=50.0	%imag=0.5	%loadloss=1.5	%noloadloss=0.25	XHL=2
New	Transformer.S12b	Phases=1	wdg=1	Bus=12.2	kV=2.4	kVA=25.0	Conn=Wye	wdg=2	Bus=x12.2	kV=0.24	Conn=Wye	kVA=25.0	%imag=0.5	%loadloss=1.5	%noloadloss=0.25	XHL=2
New	Transformer.S16c	Phases=1	wdg=1	Bus=16.3	kV=2.4	kVA=50.0	Conn=Wye	wdg=2	Bus=x16.3	kV=0.24	Conn=Wye	kVA=50.0	%imag=0.5	%loadloss=1.5	%noloadloss=0.25	XHL=2
New	Transformer.S17c	Phases=1	wdg=1	Bus=17.3	kV=2.4	kVA=25.0	Conn=Wye	wdg=2	Bus=x17.3	kV=0.24	Conn=Wye	kVA=25.0	%imag=0.5	%loadloss=1.5	%noloadloss=0.25	XHL=2
New	Transformer.S19a	Phases=1	wdg=1	Bus=19.1	kV=2.4	kVA=50.0	Conn=Wye	wdg=2	Bus=x19.1	kV=0.24	Conn=Wye	kVA=50.0	%imag=0.5	%loadloss=1.5	%noloadloss=0.25	XHL=2
New	Transformer.S20a	Phases=1	wdg=1	Bus=20.1	kV=2.4	kVA=50.0	Conn=Wye	wdg=2	Bus=x20.1	kV=0.24	Conn=Wye	kVA=50.0	%imag=0.5	%loadloss=1.5	%noloadloss=0.25	XHL=2
New	Transformer.S22b	Phases=1	wdg=1	Bus=22.2	kV=2.4	kVA=50.0	Conn=Wye	wdg=2	Bus=x22.2	kV=0.24	Conn=Wye	kVA=50.0	%imag=0.5	%loadloss=1.5	%noloadloss=0.25	XHL=2
New	Transformer.S24c	Phases=1	wdg=1	Bus=24.3	kV=2.4	kVA=50.0	Conn=Wye	wdg=2	Bus=x24.3	kV=0.24	Conn=Wye	kVA=50.0	%imag=0.5	%loadloss=1.5	%noloadloss=0.25	XHL=2
New	Transformer.S28a	Phases=1	wdg=1	Bus=28.1	kV=2.4	kVA=50.0	Conn=Wye	wdg=2	Bus=x28.1	kV=0.24	Conn=Wye	kVA=50.0	%imag=0.5	%loadloss=1.5	%noloadloss=0.25	XHL=2
New	Transformer.S29a	Phases=1	wdg=1	Bus=29.1	kV=2.4	kVA=50.0	Conn=Wye	wdg=2	Bus=x29.1	kV=0.24	Conn=Wye	kVA=50.0	%imag=0.5	%loadloss=1.5	%noloadloss=0.25	XHL=2
New	Transformer.S30c	Phases=1	wdg=1	Bus=30.3	kV=2.4	kVA=50.0	Conn=Wye	wdg=2	Bus=x30.3	kV=0.24	Conn=Wye	kVA=50.0	%imag=0.5	%loadloss=1.5	%noloadloss=0.25	XHL=2
New	Transformer.S31c	Phases=1	wdg=1	Bus=31.3	kV=2.4	kVA=25.0	Conn=Wye	wdg=2	Bus=x31.3	kV=0.24	Conn=Wye	kVA=25.0	%imag=0.5	%loadloss=1.5	%noloadloss=0.25	XHL=2
New	Transformer.S32c	Phases=1	wdg=1	Bus=32.3	kV=2.4	kVA=25.0	Conn=Wye	wdg=2	Bus=x32.3	kV=0.24	Conn=Wye	kVA=25.0	%imag=0.5	%loadloss=1.5	%noloadloss=0.25	XHL=2
New	Transformer.S33a	Phases=1	wdg=1	Bus=33.1	kV=2.4	kVA=50.0	Conn=Wye	wdg=2	Bus=x33.1	kV=0.24	Conn=Wye	kVA=50.0	%imag=0.5	%loadloss=1.5	%noloadloss=0.25	XHL=2
New	Transformer.S34c	Phases=1	wdg=1	Bus=34.3	kV=2.4	kVA=50.0	Conn=Wye	wdg=2	Bus=x34.3	kV=0.24	Conn=Wye	kVA=50.0	%imag=0.5	%loadloss=1.5	%noloadloss=0.25	XHL=2
!New	Transformer.S35a	Phases=1	wdg=1	Bus=35.1	kV=2.4	kVA=50.0	Conn=Wye	wdg=2	Bus=x35.1	kV=0.24	Conn=Wye	kVA=50.0	%imag=0.5	%loadloss=1.5	%noloadloss=0.25	XHL=2
!New	Transformer.S37a	Phases=1	wdg=1	Bus=37.1	kV=2.4	kVA=50.0	Conn=Wye	wdg=2	Bus=x37.1	kV=0.24	Conn=Wye	kVA=50.0	%imag=0.5	%loadloss=1.5	%noloadloss=0.25	XHL=2
!New	Transformer.S38b	Phases=1	wdg=1	Bus=38.2	kV=2.4	kVA=25.0	Conn=Wye	wdg=2	Bus=x38.2	kV=0.24	Conn=Wye	kVA=25.0	%imag=0.5	%loadloss=1.5	%noloadloss=0.25	XHL=2
!New	Transformer.S39b	Phases=1	wdg=1	Bus=39.2	kV=2.4	kVA=25.0	Conn=Wye	wdg=2	Bus=x39.2	kV=0.24	Conn=Wye	kVA=25.0	%imag=0.5	%loadloss=1.5	%noloadloss=0.25	XHL=2
!New	Transformer.S41c	Phases=1	wdg=1	Bus=41.3	kV=2.4	kVA=25.0	Conn=Wye	wdg=2	Bus=x41.3	kV=0.24	Conn=Wye	kVA=25.0	%imag=0.5	%loadloss=1.5	%noloadloss=0.25	XHL=2
!New	Transformer.S42a	Phases=1	wdg=1	Bus=42.1	kV=2.4	kVA=25.0	Conn=Wye	wdg=2	Bus=x42.1	kV=0.24	Conn=Wye	kVA=25.0	%imag=0.5	%loadloss=1.5	%noloadloss=0.25	XHL=2
!New	Transformer.S43b	Phases=1	wdg=1	Bus=43.2	kV=2.4	kVA=50.0	Conn=Wye	wdg=2	Bus=x43.2	kV=0.24	Conn=Wye	kVA=50.0	%imag=0.5	%loadloss=1.5	%noloadloss=0.25	XHL=2
!New	Transformer.S45a	Phases=1	wdg=1	Bus=45.1	kV=2.4	kVA=25.0	Conn=Wye	wdg=2	Bus=x45.1	kV=0.24	Conn=Wye	kVA=25.0	%imag=0.5	%loadloss=1.5	%noloadloss=0.25	XHL=2
!New	Transformer.S46a	Phases=1	wdg=1	Bus=46.1	kV=2.4	kVA=25.0	Conn=Wye	wdg=2	Bus=x46.1	kV=0.24	Conn=Wye	kVA=25.0	%imag=0.5	%loadloss=1.5	%noloadloss=0.25	XHL=2
!New	Transformer.S47	Phases=3	wdg=1	Bus=47	kV=4.160	kVA=150.0	Conn=Wye	wdg=2	Bus=x47	kV=0.480	Conn=Wye	kVA=150.0	%imag=0.5	%loadloss=1.5	%noloadloss=0.25	XHL=2
!New	Transformer.S48	Phases=3	wdg=1	Bus=48	kV=4.160	kVA=250.0	Conn=Wye	wdg=2	Bus=x48	kV=0.480	Conn=Wye	kVA=250.0	%imag=0.5	%loadloss=1.5	%noloadloss=0.25	XHL=2
!New	Transformer.S49a	Phases=1	wdg=1	Bus=49.1	kV=2.4	kVA=50.0	Conn=Wye	wdg=2	Bus=x49.1	kV=0.24	Conn=Wye	kVA=50.0	%imag=0.5	%loadloss=1.5	%noloadloss=0.25	XHL=2
!New	Transformer.S49b	Phases=1	wdg=1	Bus=49.2	kV=2.4	kVA=100.0	Conn=Wye	wdg=2	Bus=x49.2	kV=0.24	Conn=Wye	kVA=100.0	%imag=0.5	%loadloss=1.5	%noloadloss=0.25	XHL=2
!New	Transformer.S49c	Phases=1	wdg=1	Bus=49.3	kV=2.4	kVA=50.0	Conn=Wye	wdg=2	Bus=x49.3	kV=0.24	Conn=Wye	kVA=50.0	%imag=0.5	%loadloss=1.5	%noloadloss=0.25	XHL=2
!New	Transformer.S50c	Phases=1	wdg=1	Bus=50.3	kV=2.4	kVA=50.0	Conn=Wye	wdg=2	Bus=x50.3	kV=0.24	Conn=Wye	kVA=50.0	%imag=0.5	%loadloss=1.5	%noloadloss=0.25	XHL=2
!New	Transformer.S51a	Phases=1	wdg=1	Bus=51.1	kV=2.4	kVA=25.0	Conn=Wye	wdg=2	Bus=x51.1	kV=0.24	Conn=Wye	kVA=25.0	%imag=0.5	%loadloss=1.5	%noloadloss=0.25	XHL=2
New	Transformer.S52a	Phases=1	wdg=1	Bus=52.1	kV=2.4	kVA=50.0	Conn=Wye	wdg=2	Bus=x52.1	kV=0.24	Conn=Wye	kVA=50.0	%imag=0.5	%loadloss=1.5	%noloadloss=0.25	XHL=2
New	Transformer.S53a	Phases=1	wdg=1	Bus=53.1	kV=2.4	kVA=50.0	Conn=Wye	wdg=2	Bus=x53.1	kV=0.24	Conn=Wye	kVA=50.0	%imag=0.5	%loadloss=1.5	%noloadloss=0.25	XHL=2
New	Transformer.S55a	Phases=1	wdg=1	Bus=55.1	kV=2.4	kVA=25.0	Conn=Wye	wdg=2	Bus=x55.1	kV=0.24	Conn=Wye	kVA=25.0	%imag=0.5	%loadloss=1.5	%noloadloss=0.25	XHL=2
New	Transformer.S56b	Phases=1	wdg=1	Bus=56.2	kV=2.4	kVA=50.0	Conn=Wye	wdg=2	Bus=x56.2	kV=0.24	Conn=Wye	kVA=50.0	%imag=0.5	%loadloss=1.5	%noloadloss=0.25	XHL=2
New	Transformer.S58b	Phases=1	wdg=1	Bus=58.2	kV=2.4	kVA=50.0	Conn=Wye	wdg=2	Bus=x58.2	kV=0.24	Conn=Wye	kVA=50.0	%imag=0.5	%loadloss=1.5	%noloadloss=0.25	XHL=2
New	Transformer.S59b	Phases=1	wdg=1	Bus=59.2	kV=2.4	kVA=25.0	Conn=Wye	wdg=2	Bus=x59.2	kV=0.24	Conn=Wye	kVA=25.0	%imag=0.5	%loadloss=1.5	%noloadloss=0.25	XHL=2
New	Transformer.S60a	Phases=1	wdg=1	Bus=60.1	kV=2.4	kVA=25.0	Conn=Wye	wdg=2	Bus=x60.1	kV=0.24	Conn=Wye	kVA=25.0	%imag=0.5	%loadloss=1.5	%noloadloss=0.25	XHL=2
New	Transformer.S62c	Phases=1	wdg=1	Bus=62.3	kV=2.4	kVA=50.0	Conn=Wye	wdg=2	Bus=x62.3	kV=0.24	Conn=Wye	kVA=50.0	%imag=0.5	%loadloss=1.5	%noloadloss=0.25	XHL=2
New	Transformer.S63a	Phases=1	wdg=1	Bus=63.1	kV=2.4	kVA=50.0	Conn=Wye	wdg=2	Bus=x63.1	kV=0.24	Conn=Wye	kVA=50.0	%imag=0.5	%loadloss=1.5	%noloadloss=0.25	XHL=2
New	Transformer.S64b	Phases=1	wdg=1	Bus=64.2	kV=2.4	kVA=100.0	Conn=Wye	wdg=2	Bus=x64.2	kV=0.24	Conn=Wye	kVA=100.0	%imag=0.5	%loadloss=1.5	%noloadloss=0.25	XHL=2
New	Transformer.S65	Phases=3	wdg=1	Bus=65	kV=4.160	kVA=250.0	Conn=Delta	wdg=2	Bus=x65	kV=0.480	Conn=Wye	kVA=250.0	%imag=0.5	%loadloss=1.5	%noloadloss=0.25	XHL=2
New	Transformer.S66c	Phases=1	wdg=1	Bus=66.3	kV=2.4	kVA=100.0	Conn=Wye	wdg=2	Bus=x66.3	kV=0.24	Conn=Wye	kVA=100.0	%imag=0.5	%loadloss=1.5	%noloadloss=0.25	XHL=2
New	Transformer.S68a	Phases=1	wdg=1	Bus=68.1	kV=2.4	kVA=25.0	Conn=Wye	wdg=2	Bus=x68.1	kV=0.24	Conn=Wye	kVA=25.0	%imag=0.5	%loadloss=1.5	%noloadloss=0.25	XHL=2
New	Transformer.S69a	Phases=1	wdg=1	Bus=69.1	kV=2.4	kVA=50.0	Conn=Wye	wdg=2	Bus=x69.1	kV=0.24	Conn=Wye	kVA=50.0	%imag=0.5	%loadloss=1.5	%noloadloss=0.25	XHL=2
New	Transformer.S70a	Phases=1	wdg=1	Bus=70.1	kV=2.4	kVA=25.0	Conn=Wye	wdg=2	Bus=x70.1	kV=0.24	Conn=Wye	kVA=25.0	%imag=0.5	%loadloss=1.5	%noloadloss=0.25	XHL=2
New	Transformer.S71a	Phases=1	wdg=1	Bus=71.1	kV=2.4	kVA=50.0	Conn=Wye	wdg=2	Bus=x71.1	kV=0.24	Conn=Wye	kVA=50.0	%imag=0.5	%loadloss=1.5	%noloadloss=0.25	XHL=2
New	Transformer.S73c	Phases=1	wdg=1	Bus=73.3	kV=2.4	kVA=50.0	Conn=Wye	wdg=2	Bus=x73.3	kV=0.24	Conn=Wye	kVA=50.0	%imag=0.5	%loadloss=1.5	%noloadloss=0.25	XHL=2
New	Transformer.S74c	Phases=1	wdg=1	Bus=74.3	kV=2.4	kVA=50.0	Conn=Wye	wdg=2	Bus=x74.3	kV=0.24	Conn=Wye	kVA=50.0	%imag=0.5	%loadloss=1.5	%noloadloss=0.25	XHL=2
New	Transformer.S75c	Phases=1	wdg=1	Bus=75.3	kV=2.4	kVA=50.0	Conn=Wye	wdg=2	Bus=x75.3	kV=0.24	Conn=Wye	kVA=50.0	%imag=0.5	%loadloss=1.5	%noloadloss=0.25	XHL=2
New	Transformer.S76	Phases=3	wdg=1	Bus=76	kV=4.160	kVA=500.0	Conn=Delta	wdg=2	Bus=x76	kV=0.480	Conn=Wye	kVA=500.0	%imag=0.5	%loadloss=1.5	%noloadloss=0.25	XHL=2
New	Transformer.S77b	Phases=1	wdg=1	Bus=77.2	kV=2.4	kVA=50.0	Conn=Wye	wdg=2	Bus=x77.2	kV=0.24	Conn=Wye	kVA=50.0	%imag=0.5	%loadloss=1.5	%noloadloss=0.25	XHL=2
New	Transformer.S79a	Phases=1	wdg=1	Bus=79.1	kV=2.4	kVA=50.0	Conn=Wye	wdg=2	Bus=x79.1	kV=0.24	Conn=Wye	kVA=50.0	%imag=0.5	%loadloss=1.5	%noloadloss=0.25	XHL=2
New	Transformer.S80b	Phases=1	wdg=1	Bus=80.2	kV=2.4	kVA=50.0	Conn=Wye	wdg=2	Bus=x80.2	kV=0.24	Conn=Wye	kVA=50.0	%imag=0.5	%loadloss=1.5	%noloadloss=0.25	XHL=2
New	Transformer.S82a	Phases=1	wdg=1	Bus=82.1	kV=2.4	kVA=50.0	Conn=Wye	wdg=2	Bus=x82.1	kV=0.24	Conn=Wye	kVA=50.0	%imag=0.5	%loadloss=1.5	%noloadloss=0.25	XHL=2
New	Transformer.S83c	Phases=1	wdg=1	Bus=83.3	kV=2.4	kVA=25.0	Conn=Wye	wdg=2	Bus=x83.3	kV=0.24	Conn=Wye	kVA=25.0	%imag=0.5	%loadloss=1.5	%noloadloss=0.25	XHL=2
New	Transformer.S84c	Phases=1	wdg=1	Bus=84.3	kV=2.4	kVA=25.0	Conn=Wye	wdg=2	Bus=x84.3	kV=0.24	Conn=Wye	kVA=25.0	%imag=0.5	%loadloss=1.5	%noloadloss=0.25	XHL=2
New	Transformer.S85c	Phases=1	wdg=1	Bus=85.3	kV=2.4	kVA=50.0	Conn=Wye	wdg=2	Bus=x85.3	kV=0.24	Conn=Wye	kVA=50.0	%imag=0.5	%loadloss=1.5	%noloadloss=0.25	XHL=2
New	Transformer.S86b	Phases=1	wdg=1	Bus=86.2	kV=2.4	kVA=25.0	Conn=Wye	wdg=2	Bus=x86.2	kV=0.24	Conn=Wye	kVA=25.0	%imag=0.5	%loadloss=1.5	%noloadloss=0.25	XHL=2
New	Transformer.S87b	Phases=1	wdg=1	Bus=87.2	kV=2.4	kVA=50.0	Conn=Wye	wdg=2	Bus=x87.2	kV=0.24	Conn=Wye	kVA=50.0	%imag=0.5	%loadloss=1.5	%noloadloss=0.25	XHL=2
New	Transformer.S88a	Phases=1	wdg=1	Bus=88.1	kV=2.4	kVA=50.0	Conn=Wye	wdg=2	Bus=x88.1	kV=0.24	Conn=Wye	kVA=50.0	%imag=0.5	%loadloss=1.5	%noloadloss=0.25	XHL=2
New	Transformer.S90b	Phases=1	wdg=1	Bus=90.2	kV=2.4	kVA=50.0	Conn=Wye	wdg=2	Bus=x90.2	kV=0.24	Conn=Wye	kVA=50.0	%imag=0.5	%loadloss=1.5	%noloadloss=0.25	XHL=2
New	Transformer.S92c	Phases=1	wdg=1	Bus=92.3	kV=2.4	kVA=50.0	Conn=Wye	wdg=2	Bus=x92.3	kV=0.24	Conn=Wye	kVA=50.0	%imag=0.5	%loadloss=1.5	%noloadloss=0.25	XHL=2
New	Transformer.S94a	Phases=1	wdg=1	Bus=94.1	kV=2.4	kVA=50.0	Conn=Wye	wdg=2	Bus=x94.1	kV=0.24	Conn=Wye	kVA=50.0	%imag=0.5	%loadloss=1.5	%noloadloss=0.25	XHL=2
New	Transformer.S95b	Phases=1	wdg=1	Bus=95.2	kV=2.4	kVA=25.0	Conn=Wye	wdg=2	Bus=x95.2	kV=0.24	Conn=Wye	kVA=25.0	%imag=0.5	%loadloss=1.5	%noloadloss=0.25	XHL=2
New	Transformer.S96b	Phases=1	wdg=1	Bus=96.2	kV=2.4	kVA=25.0	Conn=Wye	wdg=2	Bus=x96.2	kV=0.24	Conn=Wye	kVA=25.0	%imag=0.5	%loadloss=1.5	%noloadloss=0.25	XHL=2
New	Transformer.S98a	Phases=1	wdg=1	Bus=98.1	kV=2.4	kVA=50.0	Conn=Wye	wdg=2	Bus=x98.1	kV=0.24	Conn=Wye	kVA=50.0	%imag=0.5	%loadloss=1.5	%noloadloss=0.25	XHL=2
New	Transformer.S99b	Phases=1	wdg=1	Bus=99.2	kV=2.4	kVA=50.0	Conn=Wye	wdg=2	Bus=x99.2	kV=0.24	Conn=Wye	kVA=50.0	%imag=0.5	%loadloss=1.5	%noloadloss=0.25	XHL=2
New	Transformer.S100c	Phases=1	wdg=1	Bus=100.3	kV=2.4	kVA=50.0	Conn=Wye	wdg=2	Bus=x100.3	kV=0.24	Conn=Wye	kVA=50.0	%imag=0.5	%loadloss=1.5	%noloadloss=0.25	XHL=2
!New	Transformer.S102c	Phases=1	wdg=1	Bus=102.3	kV=2.4	kVA=25.0	Conn=Wye	wdg=2	Bus=x102.3	kV=0.24	Conn=Wye	kVA=25.0	%imag=0.5	%loadloss=1.5	%noloadloss=0.25	XHL=2
!New	Transformer.S103c	Phases=1	wdg=1	Bus=103.3	kV=2.4	kVA=50.0	Conn=Wye	wdg=2	Bus=x103.3	kV=0.24	Conn=Wye	kVA=50.0	%imag=0.5	%loadloss=1.5	%noloadloss=0.25	XHL=2
!New	Transformer.S104c	Phases=1	wdg=1	Bus=104.3	kV=2.4	kVA=50.0	Conn=Wye	wdg=2	Bus=x104.3	kV=0.24	Conn=Wye	kVA=50.0	%imag=0.5	%loadloss=1.5	%noloadloss=0.25	XHL=2
!New	Transformer.S106b	Phases=1	wdg=1	Bus=106.2	kV=2.4	kVA=50.0	Conn=Wye	wdg=2	Bus=x106.2	kV=0.24	Conn=Wye	kVA=50.0	%imag=0.5	%loadloss=1.5	%noloadloss=0.25	XHL=2
!New	Transformer.S107b	Phases=1	wdg=1	Bus=107.2	kV=2.4	kVA=50.0	Conn=Wye	wdg=2	Bus=x107.2	kV=0.24	Conn=Wye	kVA=50.0	%imag=0.5	%loadloss=1.5	%noloadloss=0.25	XHL=2
!New	Transformer.S109a	Phases=1	wdg=1	Bus=109.1	kV=2.4	kVA=50.0	Conn=Wye	wdg=2	Bus=x109.1	kV=0.24	Conn=Wye	kVA=50.0	%imag=0.5	%loadloss=1.5	%noloadloss=0.25	XHL=2
!New	Transformer.S111a	Phases=1	wdg=1	Bus=111.1	kV=2.4	kVA=25.0	Conn=Wye	wdg=2	Bus=x111.1	kV=0.24	Conn=Wye	kVA=25.0	%imag=0.5	%loadloss=1.5	%noloadloss=0.25	XHL=2
!New	Transformer.S112a	Phases=1	wdg=1	Bus=112.1	kV=2.4	kVA=25.0	Conn=Wye	wdg=2	Bus=x112.1	kV=0.24	Conn=Wye	kVA=25.0	%imag=0.5	%loadloss=1.5	%noloadloss=0.25	XHL=2
!New	Transformer.S113a	Phases=1	wdg=1	Bus=113.1	kV=2.4	kVA=50.0	Conn=Wye	wdg=2	Bus=x113.1	kV=0.24	Conn=Wye	kVA=50.0	%imag=0.5	%loadloss=1.5	%noloadloss=0.25	XHL=2
!New	Transformer.S114a	Phases=1	wdg=1	Bus=114.1	kV=2.4	kVA=25.0	Conn=Wye	wdg=2	Bus=x114.1	kV=0.24	Conn=Wye	kVA=25.0	%imag=0.5	%loadloss=1.5	%noloadloss=0.25	XHL=2
